// SBML level 2 version 4

function Rate_Law_for_R_damage(drug1, repair_rate, damage, k)
  k*drug1 - repair_rate*damage;
end

model PDynamics()

  // Compartments:
  compartment volume; volume is "compartment_intracellular";

  // Species:
  substanceOnly species drug1 in volume = 1;
  substanceOnly species damage in volume = 0;
  substanceOnly species $volume_1 in volume = 1;

  // Parameters:
  linear_metabolism_rate = 0.05 unit_0;
  repair_rate = 0.01 unit_0;
  volume_0 = 1 unit_1;
  k = 0.01 unit_0;
  Initial_for_volume = volume_1;

  // Assignment rules:
  volume := Initial_for_volume;

  // Reactions:
  R_Drug1: drug1 => ; linear_metabolism_rate*drug1;
  R_damage: => damage; volume*Rate_Law_for_R_damage(drug1/volume, repair_rate, damage/volume, k);  // modifiers: drug1

  // Unit definitions:
  unit length = metre;
  unit area = metre^2;
  unit volume = litre;
  unit time = 0.06 second;
  unit substance = mole;
  unit unit_0 = 1 / (0.06 second); unit_0 is "1/min";
  unit unit_1 = litre; unit_1 is "l";
end
