// SBML level 2 version 4

model New_Model()
  // Sample

  // Compartments:
  compartment Intracellular = 1;

  // Species:
  species Glucose in Intracellular = 100;
  species Oxygen in Intracellular = 100;
  species Energy in Intracellular = 450;
  species Lactate in Intracellular = 0;
  species apoptosis_rate in Intracellular = 0;
  species migration_speed in Intracellular = 0;
  species Lac_Secretion_Rate in Intracellular = 0;
  species Transition_Rate in Intracellular = 0;

  // Parameters:
  k_aer = 0.01;
  k_ane = 0.00018;
  k_usage = 0.0023;
  energy_move_thresh = 440;
  energy_death_thresh = 430;
  energy_prolif_thresh = 445;

  // Reactions:
  Aerobic: Glucose + 6 Oxygen => 38 Energy; Intracellular*Aerobic_k1*Glucose*Oxygen^6;
    Aerobic_k1 = 0.1;
  Anaerobic: Glucose => 2 Energy + Lactate; Intracellular*Anaerobic_k1*Glucose;
    Anaerobic_k1 = 0.1;
  Energy_Usage: Energy => ; Intracellular*Energy_Usage_k1*Energy;
    Energy_Usage_k1 = 0.1;

  // Events:
  die: at (Energy < energy_death_thresh): apoptosis_rate = 9;
  do_not_move: at (Energy > energy_move_thresh): migration_speed = 0;
  move: at (Energy < energy_move_thresh): migration_speed = 10;
  Lac_Sec: at (Lactate > 0.01): Lac_Secretion_Rate = 0.0001;
  divide: at (Energy > energy_prolif_thresh): Transition_Rate = 0.000166666666;
  do_not_divide: at (Energy < energy_prolif_thresh): Transition_Rate = 0;

  // Unit definitions:
  unit length = metre;
  unit area = metre^2;
  unit volume = 1e-3 litre;
  unit time = second;
  unit substance = 1e-3 mole;
end
